<Node dt="0.05" name="root" gravity="0 0 -9.81">
  <Node name="bunny">
    <MeshVTKLoader createSubelements="0" filename="bunnyVolumeMesh.vtk" name="LOADER"/>
    <MechanicalObject name="dofs" src="@LOADER" template="Vec3f"/>
    <MeshTopology name="topo" src="@LOADER"/>
    <TetrahedronFEMForceField listening="true" name="FEM" poissonRatio="0.49" template="Vec3f" youngModulus="80000 80000 80000 80000 80000 80000 80000 80000 80000 80000 80000 80000 80000 80000 80000 80000 80000 80000 80000 80000 80000 80000 80000 80000 80000 80000 80000 80000 80000 80000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"/>
    <TetrahedronSetGeometryAlgorithms name="aTetrahedronSetGeometryAlgorithm" template="Vec3f"/>
    <FixedConstraint indices="0, 1, 2, 3, 4, 5, 6, 8, 10, 11, 12, 13, 16, 17, 19, 20, 22, 24, 25, 27, 28, 29, 30, 35, 38, 39, 41, 42, 43, 44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" name="test"/>
  </Node>
  <DiagonalMass name="meshMass" massDensity="1000 1000 1000 1000 1000 1000 1000 1000 1000 1000 1000 1000 1000 1000 1000 1000 1000 1000 1000 1000 1000 1000 1000 1000 1000 1000 1000 1000 1000 1000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"/>
  <EulerImplicitSolver name="odesolver"/>
  <CGLinearSolver iterations="100" threshold="1e-06" tolerance="1e-06"/>
</Node>
