<Node dt="0.05" name="root" gravity="0 0 -9.81">
  <Node name="bunny">
    <MeshVTKLoader createSubelements="0" filename="bunnyVolumeMeshCGAL.vtk" name="LOADER"/>
    <MechanicalObject name="dofs" src="@LOADER" template="Vec3f"/>
    <MeshTopology name="topo" src="@LOADER"/>
    <TetrahedronFEMForceField listening="true" name="FEM" poissonRatio="0.49" template="Vec3f" youngModulus="80000 80000 80000 80000 80000 80000 80000 80000 80000 80000 80000 80000 80000 80000 80000 80000 80000 80000 80000 80000 80000 80000 80000 80000 80000 80000 80000 80000 80000 80000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"/>
    <TetrahedronSetGeometryAlgorithms name="aTetrahedronSetGeometryAlgorithm" template="Vec3f"/>
    <FixedConstraint indices="41, 55, 62, 89, 128, 135, 154, 155, 157, 192, 224, 235, 257, 269, 314, 337, 344, 354, 376, 379, 399, 415, 424, 439, 471, 476, 508, 521, 523, 548" name="bodyConstraint"/>
  </Node>
  <EulerImplicitSolver name="odesolver"/>
  <CGLinearSolver iterations="100" threshold="1e-06" tolerance="1e-06"/>
</Node>
