'''
Created on 03.12.2014

@author: schaub
'''
# region gplv3preamble
# The Medical Simulation Markup Language (MSML) - Simplifying the biomechanical modeling workflow
#
# MSML has been developed in the framework of 'SFB TRR 125 Cognition-Guided Surgery'
#
# If you use this software in academic work, please cite the paper:
# S. Suwelack, M. Stoll, S. Schalck, N.Schoch, R. Dillmann, R. Bendl, V. Heuveline and S. Speidel,
# The Medical Simulation Markup Language (MSML) - Simplifying the biomechanical modeling workflow,
# Medicine Meets Virtual Reality (MMVR) 2014
#
# Copyright (C) 2013-2014 see Authors.txt
#
# If you have any questions please feel free to contact us at suwelack@kit.edu
#
# This program is free software: you can redistribute it and/or modify
# it under the terms of the GNU General Public License as published by
# the Free Software Foundation, either version 3 of the License, or
# (at your option) any later version.
#
# This program is distributed in the hope that it will be useful,
# but WITHOUT ANY WARRANTY; without even the implied warranty of
# MERCHANTABILITY or FITNESS FOR A PARTICULAR PURPOSE.  See the
# GNU General Public License for more details.
#
# You should have received a copy of the GNU General Public License
# along with this program.  If not, see <http://www.gnu.org/licenses/>.
# endregion


__authors__ = 'Stefan Suwelack, Alexander Weigl, Markus Stoll'
__license__ = 'GPLv3'
__date__ = "2014-03-13"

import math
import os
import random

from path import path
import lxml.etree as etree

from ..base import XMLExporter, Exporter
from msml.exceptions import *
import msml.env
from msml.model import *
from ...log import error, warn, info, fatal, critical, debug
from ...sortdef import VTK
import jinja2

class MSMLSOFAExporterWarning(MSMLWarning): pass

jinja_env = jinja2.Environment(loader=jinja2.FileSystemLoader(path(__file__).dirname()))

SCENE_TEMPLATE = jinja_env.get_template("sofacontact_scene.xml")
COLLISION_NODE_TEMPLATE = jinja_env.get_template("sofacontact_collisionnode.xml")
NODE_TEMPLATE = jinja_env.get_template("sofacontact_node.xml")
MESH_TOPOLOGY_TEMPLATE = jinja_env.get_template("sofacontact_meshtopo.xml")
NODE_SOLVERS_TEMPLATE = jinja_env.get_template("sofacontact_nodesolver.xml")
MATERIAL_NODES_TEMPLATE = jinja_env.get_template("sofacontact_materialnodes.xml")

SOFA_EXPORTER_FEATURES = frozenset(
    ['object_element_displacement_supported', 'output_supported', 'object_element_mass_supported',
     'scene_objects_supported', 'constraints_supported', 'env_processingunit_CPU_supported',
     'material_region_supported', 'env_linearsolver_iterativeCG_supported', 'env_preconditioner_None_supported',
     'object_element_linearElasticMaterial_supported', 'sets_elements_supported', 'sets_nodes_supported',
     'sets_surface_supported', 'environment_simulation_steps_supported', 'object_element_fixedConstraint_supported',
     'env_timeintegration_dynamicImplicitEuler_supported'])


class SofaExporter(XMLExporter):
    def __init__(self, msml_file):
        """
      Args:
       executer (Executer)


      """
        self.id = 'SOFAExporter'
        self.initialize(
            msml_file, name=self.id,
            features=SOFA_EXPORTER_FEATURES
        )
        self.export_file = None
        self.working_dir = path()  #path.dirname(msml_file.filename)
        self._memory_update = {}  #cache for changes to _memory, updated after execution.

    def init_exec(self, executer):
        """initialization by the executer, sets memory and executor member

         :return:
        """

        self._executer = executer
        self._memory = self._executer._memory

    def render(self):
        """
        Builds the File (XML e.g) for the external tool
        """

        self.export_file = path(self._msml_file.filename).namebase + ".scn"
        info("Converting to sofa scn: %s", self.export_file)

        import codecs

        with codecs.open(self.export_file, 'w', 'utf-8') as scnfile:  #should be open with codecs.open
            rootelement = self.write_scn()
            rootelement.write(scnfile, pretty_print=True)
            #s = etree.tostring(rootelement, encoding="utf-8")
            #scnfile.write(s)


    def write_scn(self):
        processingUnit = self._msml_file.env.solver.processingUnit
        #TODO: processingUnit = self.get_value_from_memory(self._msml_file.env.solver.processingUnit)
        self._processing_unit = "Vec3d" if processingUnit == "CPU" else "CudaVec3d"

        self.node_root = self.createScene()

        nodes = ""

        for msmlObject in self._msml_file.scene:
            assert isinstance(msmlObject, SceneObject)

            #create object, the mesh, material regions and constraints
            objectNode = self.createObject(self.node_root, msmlObject)

            #physicsElementNode = msmlObject.find("material")
            self.createMeshTopology(objectNode, msmlObject)
            self.createMaterialRegions(objectNode, msmlObject)

            #create simulation steps
            self.createConstraintRegions(objectNode, msmlObject)

            #creat post processing request
            self.createPostProcessingRequests(objectNode, msmlObject)

            #create nodes by template
            #create mesh topology
            mesh_type = msmlObject.mesh.type
            mesh_id = (msmlObject.id + "_mesh")
            meshFileName = self.working_dir / self.get_value_from_memory(mesh_id)
            meshTopology = MESH_TOPOLOGY_TEMPLATE.render(meshFileName=meshFileName)
            #create material nodes
            materialNodes = MATERIAL_NODES_TEMPLATE.render()
            #create solvers
            solvers = NODE_SOLVERS_TEMPLATE.render()
            #create collision node, if necessary
            collisionNode = None
            if(msmlObject.contactSurface.id is not None):
                surface_id = (msmlObject.id + "_surface")
                surfaceFileName = self.working_dir / self.get_value_from_memory(surface_id)
                collisionNode = COLLISION_NODE_TEMPLATE.render(surfaceFileName=surfaceFileName)

            #create node and append to node list
            nodes = nodes + (NODE_TEMPLATE.render(nodeName=msmlObject.id,solvers=solvers,meshTopology=meshTopology,childNodes=collisionNode if collisionNode else ''))


            #add solver
        #render scene file
        dt = str(self._msml_file.env.simulation[0].dt)
        theGravityVec = self._msml_file.env.simulation[0].gravity
        theGravity = str(theGravityVec)
        renderedScene = SCENE_TEMPLATE.render(timestep=dt,gravity=theGravity,nodes=nodes)
        rendereSceneXML = etree.fromstring(renderedScene,parser = etree.XMLParser(remove_blank_text=True))

        self.createSolvers()
        sofatemplatetest = path(self._msml_file.filename).namebase + "_temptest.scn"
        with open(sofatemplatetest, 'w') as fp:
            fp.write(etree.tostring(rendereSceneXML,pretty_print=True))

        return etree.ElementTree(self.node_root)

    def createMeshTopology(self, objectNode, msmlObject):
        assert isinstance(msmlObject, SceneObject)

        mesh_type = msmlObject.mesh.type
        mesh_id = (msmlObject.id + "_mesh")
        meshFileName = self.working_dir / self.get_value_from_memory(mesh_id)

        # TODO currentMeshNode.get("name" )) - having a constant name for our the loader simplifies using it as source for nodes generated later.

        #check if child is present
        #if so, check operator compatibility
        #execute operator
        #check if mesh is in MSML folder

        #if not -> copy

        if mesh_type == "linearTet":
            loaderNode = self.sub("MeshVTKLoader", objectNode,
                                  name="LOADER", filename=meshFileName,
                                  createSubelements=0)
            #  createSubelements does not work as expected. If a single triangle exists in mesh, then for each facet of all tets a triangle is ceated... SOFA bug?
            self.sub("MechanicalObject", objectNode,
                     name="dofs", template=self._processing_unit, src="@LOADER")
            self.sub("MeshTopology", objectNode,
                     name="topo", src="@LOADER")
            #create collision stuff
            #create sub node
            #<MeshVTKLoader name="LOADER"  filename="cycytube_labled_combo.vtk-surface1.vtk"  createSubelements="0" />
            #<MechanicalObject template="Vec3d" name="dofs"  position="@LOADER.position"  velocity="0 0 0"  force="0 0 0"  externalForce="0 0 0"  derivX="0 0 0"  restScale="1" />
            #<MeshTopology name="topo"  position="@LOADER.position"  edges="@LOADER.edges"  triangles="@LOADER.triangles"  quads="@LOADER.quads"  tetrahedra="@LOADER.tetras"  hexahedra="@LOADER.hexas" />
            #<BarycentricMapping template="Vec3d,Vec3d" name="barycentricMap1"  input="@../"  output="@./" />
            #<TriangleModelInRegularGrid template="Vec3d" name="tTriangleModel1" />
            #<TLineModel template="Vec3d" name="default14" />
            #<TPointModel template="Vec3d" name="default15" />

            #test if surface exists -> no surface, no contact model (for now)
            if(msmlObject.contactSurface.id is not None):
                self.createContactNode(objectNode,msmlObject)

        elif mesh_type == "quadraticTet":
            loaderNode = self.sub("MeshExtendedVTKLoader", objectNode,
                                  name="LOADER", filename=meshFileName)
            self.sub("MechanicalObject", objectNode,
                     name="dofs", template=self._processing_unit, src="@LOADER")
            self.sub("QuadraticMeshTopology", objectNode,
                     name="topo", src="@LOADER")
        else:
            warn(MSMLSOFAExporterWarning,
                 "Mesh type must be mesh.volume.linearTetrahedron.vtk or mesh.volume.quadraticTetrahedron.vtk")
            return None
        return loaderNode

    def createContactNode(self,objectNode,msmlObject):
        surface_id = (msmlObject.id + "_surface")
        surfaceFileName = self.working_dir / self.get_value_from_memory(surface_id)
        collisionNode = self.sub("Node",objectNode,name="1")
        self.sub("MeshVTKLoader", collisionNode,name="LOADER" ,filename=surfaceFileName, createSubelements="0")
        self.sub("MechanicalObject",collisionNode,template="Vec3d", name="dofs",
                                            position="@LOADER.position",velocity="0 0 0",
                                            force="0 0 0",externalForce="0 0 0", derivX="0 0 0",  restScale="1" )
        self.sub("MeshTopology",collisionNode,name="topo",position="@LOADER.position",edges="@LOADER.edges",
                                        triangles="@LOADER.triangles",quads="@LOADER.quads", tetrahedra="@LOADER.tetras",  hexahedra="@LOADER.hexas")
        self.sub("BarycentricMapping", collisionNode,template="Vec3d,Vec3d", name="barycentricMap1",  input="@../",  output="@./" )
        self.sub("TriangleModelInRegularGrid",collisionNode,template="Vec3d", name="tTriangleModel1")
        self.sub("TLineModel", collisionNode,template="Vec3d", name="default14" )
        self.sub("TPointModel", collisionNode,template="Vec3d", name="default15" )

    def createSolvers(self):
        #TODO: self.get_value_from_memory
        if self._msml_file.env.solver.timeIntegration == "Newmark":
            self.sub("MyNewmarkImplicitSolver",
                     rayleighStiffness="0.2",
                     rayleighMass="0.02",
                     name="odesolver")

        elif self._msml_file.env.solver.timeIntegration == "dynamicImplicitEuler":
            self.sub("EulerImplicitSolver",
                     name="odesolver")
        else:
            warn(MSMLSOFAExporterWarning, "Error ODE solver %s not supported" %
                 self._msml_file.env.solver.timeIntegration)

        if self._msml_file.env.solver.linearSolver == "direct":
            self.sub("SparseMKLSolver")
        elif self._msml_file.env.solver.linearSolver == "iterativeCG":
            self.sub("CGLinearSolver",
                     iterations="100", tolerance="1e-06", threshold="1e-06")
        else:
            warn(MSMLSOFAExporterWarning, "Error linear solver %s not supported" %
                 self._msml_file.env.solver.linearSolver)


    def createMaterialRegions(self, objectNode, msmlObject):
        assert isinstance(msmlObject, SceneObject)

        youngs = {}
        poissons = {}
        density = {}

        for matregion in msmlObject.material:
            assert isinstance(matregion, MaterialRegion)
            indices_vec = self.get_value_from_memory(matregion)
            indices = '%s' % ', '.join(map(str, indices_vec))

            indices_int = [int(i) for i in indices.split(",")]
            indices_int.sort()

            #Get all materials
            for material in matregion:
                assert isinstance(material, ObjectElement)
                currentMaterialType = material.tag  #TODO: self.get_value_from_memory

                if currentMaterialType == "linearElasticMaterial":
                    currentYoungs = self.get_value_from_memory(material, "youngModulus")
                    currentPoissons = self.get_value_from_memory(material,
                                                                 "poissonRatio")  # not implemented in sofa yet!
                    for i in indices_int:  #TODO Performance (maybe generator should be make more sense)
                        youngs[i] = currentYoungs
                        poissons[i] = currentPoissons
                elif currentMaterialType == "mass":
                    currentDensity = self.get_value_from_memory(material, "massDensity")
                    for i in indices_int:
                        density[i] = currentDensity
                else:
                    warn("Material Type not supported %s" % currentMaterialType, MSMLSOFAExporterWarning)


        def _to_str(mapping):
            keys = list(mapping.keys())
            keys.sort()
            sorted_values = (mapping[k] for k in keys)
            return ' '.join(map(str, sorted_values))

        density_str = _to_str(density)
        youngs_str = _to_str(youngs)
        poissons_str = _to_str(poissons)


        #merge all different materials to single forcefield/density entries.
        if objectNode.find("MeshTopology") is not None:
            elasticNode = self.sub("TetrahedronFEMForceField", objectNode,
                                   template=self._processing_unit, name="FEM",
                                   listening="true", youngModulus=youngs_str,
                                   poissonRatio=poissons[indices_int[0]])
            self.sub("TetrahedronSetGeometryAlgorithms", objectNode,
                     name="aTetrahedronSetGeometryAlgorithm",
                     template=self._processing_unit)
            massNode = self.sub("DiagonalMass", objectNode, name="meshMass")
            massNode.set("massDensity", density_str)

        elif objectNode.find("QuadraticMeshTopology") is not None:
            eelasticNode = self.sub("QuadraticTetrahedralCorotationalFEMForceField", objectNode,
                                    template=self._processing_unit, name="FEM", listening="true",
                                    youngModulus=youngs[0],
                                    poissonRatio=poissons[indices_int[0]])  # TODO
            emassNode = self.sub("QuadraticMeshMatrixMass", objectNode,
                                 name="meshMass", massDensity=density[0])
        else:
            warn(MSMLSOFAExporterWarning, "Current mesh topology not supported")


    def createConstraintRegions(self, objectNode, msmlObject):
        def _to_str(mapping):
            if (mapping is str):
                return mapping
            return ' '.join(map(str, mapping))

        assert isinstance(msmlObject, SceneObject)

        for constraint_set in (msmlObject.constraints[0], ):  #TODO take all constraints
            assert isinstance(constraint_set, ObjectConstraints)

            for constraint in constraint_set.constraints:
                assert isinstance(constraint, ObjectElement)
                currentConstraintType = constraint.tag

                if currentConstraintType == "fixedConstraint":
                    indices_vec = self.get_value_from_memory(constraint, 'indices')
                    indices = '%s' % ', '.join(map(str, indices_vec))
                    constraintNode = self.sub("FixedConstraint", objectNode,
                                              name=constraint.id or constraint_set.name,
                                              indices=indices)

                    #elasticNode.set("setPoissonRatio", material.get("poissonRatio"))

                    #check if child is present

                    #if so, check operator compatibility

                    #execute operator

                    #check if mesh is in MSML folder

                    #if not -> copy
                elif currentConstraintType == "surfacePressure":
                    indices_vec = self.get_value_from_memory(constraint, 'indices')
                    indices = '%s' % ', '.join(map(str, indices_vec))
                    constraintNode = self.sub("Node", objectNode, name="SurfaceLoad")

                    self.sub("MeshTopology", constraintNode,
                             name="SurfaceTopo",
                             position="@LOADER.position",
                             triangles="@LOADER.triangles", quads="@LOADER.quads")

                    self.sub("MechanicalObject", constraintNode, template="Vec3d", name="surfacePressDOF",
                             position="@SurfaceTopo.position")
                    p = self.get_value_from_memory(constraint, 'pressure')
                    p_speed = p / 10

                    surfacePressureForceFieldNode = self.sub("SurfacePressureForceField", constraintNode,
                                                             template="Vec3d",
                                                             name="surfacePressure",
                                                             pulseMode="1",
                                                             pressureSpeed=p_speed,
                                                             # TODO this is broken
                                                             pressure=p,
                                                             triangleIndices=indices)

                    self.sub("BarycentricMapping", constraintNode,
                             template=self._processing_unit + ",Vec3d",
                             name="barycentricMapSurfacePressure",
                             input="@..", output="@.")

                elif currentConstraintType == "springMeshToFixed":

                    constraintNode = self.sub("Node", objectNode, name="springMeshToFixed")
                    mechObj = self.sub("MechanicalObject", constraintNode, template="Vec3d",
                                       name="pointsInDeformingMesh",
                                       position=_to_str(self.get_value_from_memory(constraint, 'movingPoints')))

                    self.sub("BarycentricMapping", constraintNode,
                             template=self._processing_unit + ",Vec3d",
                             name="barycentricMapSpringMeshToFixed",
                             input="@..",
                             output="@.")

                    displacedLandLMarks = self.sub("Node", constraintNode,
                                                   name="fixedPointsForSpringMeshToFixed")

                    mechObj = self.sub("MechanicalObject", displacedLandLMarks,
                                       template="Vec3d",
                                       name="fixedPoints")

                    mechObj.set("position", _to_str(self.get_value_from_memory(constraint, 'fixedPoints')))

                    forcefield = self.sub("RestShapeSpringsForceField", constraintNode,
                                          template="Vec3d",
                                          name="Springs",
                                          external_rest_shape="fixedPointsForSpringMeshToFixed/fixedPoints",
                                          drawSpring="true",
                                          stiffness=self.get_value_from_memory(constraint, 'stiffness'),
                                          rayleighStiffnes=self.get_value_from_memory(constraint, 'rayleighStiffnes'))

                elif currentConstraintType == "supportingMesh":

                    constraintNode = self.sub("Node", objectNode, name="support_" + constraint.get("name"))
                    loaderNode = self.sub("MeshVTKLoader", constraintNode,
                                          name="LOADER_supportmesh",
                                          createSubelements="0",
                                          filename=self.get_value_from_memory(constraint, 'filename'))

                    self.sub("MechanicalObject", constraintNode,
                             name="dofs",
                             src="@LOADER_supportmesh",
                             template="Vec3d",
                             translation="0 0 0")

                    self.sub("MeshTopology", constraintNode,
                             name="topo",
                             src="@LOADER_supportmesh")

                    forcefield = self.sub("TetrahedronFEMForceField", constraintNode, listening="true",
                                          name="FEM", template="Vec3d",
                                          youngModulus=self.get_value_from_memory(constraint, 'youngModulus'),
                                          poissonRatio=self.get_value_from_memory(constraint, 'poissonRatio'))

                    self.sub("TetrahedronSetGeometryAlgorithms", constraintNode,
                             name="aTetrahedronSetGeometryAlgorithm",
                             template="Vec3d")

                    diagonalMass = self.sub("DiagonalMass", constraintNode,
                                            name="meshMass",
                                            massDensity=self.get_value_from_memory(constraint, 'massDensity'))

                    self.sub("BarycentricMapping", constraintNode,
                             input="@..",
                             name="barycentricMap",
                             output="@.",
                             template=self._processing_unit + ",Vec3d")

                elif currentConstraintType == "displacementConstraint":
                    indices_vec = self.get_value_from_memory(constraint, 'indices')
                    indices = '%s' % ', '.join(map(str, indices_vec))

                    #compute length of time stepo
                    timeSteps = self._msml_file.env.simulation[0].iterations
                    dt = self._msml_file.env.simulation[0].dt
                    timestep = float(timeSteps) * float(dt)
                    keytimes = '0 ' + str(timestep) + ' ' + str(
                        100000)  # this is a bad hack! -> if simulation runs further, it stays stable

                    #TODO: How do we get the disp values from memory?
                    disp_vec = self.get_value_from_memory(constraint, 'displacement')
                    #disp_vec = {0,0,0.01}
                    #if '$' not in constraint.displacement:
                    #    disp_vec = [float(x) for x in constraint.displacement]

                    tempMovement = '%s' % ' '.join(map(str, disp_vec))
                    theMovement = "0 0 0 " + tempMovement + " 0 0 0"
                    constraintNode = self.sub('LinearMovementConstraint', objectNode,
                                              name=constraint.id or constraint_set.name,
                                              indices=indices, movements=theMovement, keyTimes=keytimes)
                    #constraintNode = self.sub("DirichletBoundaryConstraint", objectNode,
                    #                      name=constraint.id or constraint_set.name,
                    #                      dispIndices=indices, displacements=constraint.displacement)
                else:
                    warn(MSMLSOFAExporterWarning, "Constraint Type not supported %s " % currentConstraintType)


    def createObject(self, currentSofaNode, scobj):
        assert isinstance(scobj, SceneObject)
        objectNode = self.sub("Node", name=scobj.id)
        return objectNode


    def createScene(self):
        dt = str(self._msml_file.env.simulation[0].dt)
        root = etree.Element("Node", name="root", dt=dt)
        theGravityVec = self._msml_file.env.simulation[0].gravity
        theGravity = str(theGravityVec)
        #timeSteps = self._msml_file.env.simulation[0].iterations  #only one step supported
        if theGravity is None:
            theGravity = '0 -9.81 0'
        root.set("gravity", theGravity)

        #create collision detection stuff
        #<LayeredDepthImagesPipeline name="default0"  pressure="5"  resolution="128"  resolutionPixel="80"  depthBB="6"  GPUCollisionVolume="1" />
        #<LDIDetection name="default1" />
        #<MinProximityIntersection name="Proximity"  alarmDistance="0.3"  contactDistance="0.2" />
        #<BruteForceDetection name="N2" />
        #<DefaultContactManager name="Response"  response="LDI" />
        #<DefaultCollisionGroupManager name="Group" />
        ldiPipeline = etree.SubElement(root,"LayeredDepthImagesPipeline",name="default0",pressure="5",
                                                                 resolution="128",resolutionPixel="80",
                                                                 depthBB="6",  GPUCollisionVolume="1")
        ldiDetection = etree.SubElement(root,"LDIDetection", name="default1" )
        minProxIntersection = etree.SubElement(root,"MinProximityIntersection", name="Proximity",alarmDistance="0.3",contactDistance="0.2")
        bruteForceDetect = etree.SubElement(root,"BruteForceDetection", name="N2")
        contactManager = etree.SubElement(root,"DefaultContactManager", name="Response",  response="LDI")
        collisionManager = etree.SubElement(root,"DefaultCollisionGroupManager", name="Group")


        return root

        #sofa_exporter handles displacementOutputRequest only. Other postProcessing operators need to be adressed in... ?


    def createPostProcessingRequests(self, objectNode, msmlObject):
        for request in msmlObject.output:
            assert isinstance(request, ObjectElement)
            filename = self.working_dir / request.id

            if request.tag == "displacement":
                if objectNode.find("MeshTopology") is not None:
                    #dispOutputNode = self.sub(currentSofaNode, "ExtendedVTKExporter" )
                    exportEveryNumberOfSteps = request.get(
                        'timestep')  #TODO: self.get_value_from_memory(request, 'timestep')

                    dispOutputNode = self.sub("VTKExporter", objectNode,
                                              filename=filename,
                                              exportEveryNumberOfSteps=exportEveryNumberOfSteps,
                                              XMLformat=1,
                                              edges=0,
                                              #todo export material => allows extraction of surfaces in post processing
                                              tetras=1,
                                              triangles=0,
                                              listening="true",
                                              exportAtEnd="true")

                    timeSteps = self._msml_file.env.simulation[0].iterations  #TODO: self.get_value_from_memory

                    #exportEveryNumberOfSteps = 1 in SOFA means export every second time step.
                    #exportEveryNumberOfSteps = 0 in SOFA means do not export.
                    if exportEveryNumberOfSteps == 0:
                        lastNumber = 1
                    else:
                        lastNumber = int(math.floor(int(timeSteps) / ( int(exportEveryNumberOfSteps) + 1)))

                    if _bool(request.useAsterisk):  #TODO: et_value_from_memory(request, 'useAsterisk')
                        self._memory_update[self.id] = {request.id: VTK(str(filename + '*' + ".vtu"))}
                    else:
                        self._memory_update[self.id] = {request.id: VTK(str(filename + str(lastNumber) + ".vtu"))}


                elif objectNode.find("QuadraticMeshTopology") is not None:
                    exportEveryNumberOfSteps = self.get_value_from_memory(request, 'timestep')

                    dispOutputNode = self.sub("ExtendedVTKExporter", objectNode,
                                              filename=filename,
                                              exportEveryNumberOfSteps=exportEveryNumberOfSteps,
                                              #todo export material => allows extraction of surfaces in post processing
                                              tetras=0,
                                              quadraticTetras=1,
                                              listening="true",
                                              exportAtEnd="true")

                    # untested block:

                    # timeSteps = self._msml_file.env.simulation[0].iterations
                    #
                    # #exportEveryNumberOfSteps = 1 in SOFA means export every second time step.
                    # #exportEveryNumberOfSteps = 0 in SOFA means do not export.
                    # if exportEveryNumberOfSteps == 0:
                    #     lastNumber = 1
                    # else:
                    #     lastNumber = int(math.floor(int(timeSteps) / ( int(exportEveryNumberOfSteps) + 1)))
                    #
                    #if _bool(request.useAsterisk):
                    #    self._memory_update[self.id] = {request.id: VTK(str(filename + '*' + ".vtu"))}
                    #else:
                    #    self._memory_update[self.id] = {request.id: VTK(str(filename + str(lastNumber) + ".vtu"))}


                    #TODO: Fill "filename" of request taking output numbering into account (see VTKExporter)
                else:
                    warn(MSMLSOFAExporterWarning, "Topolgy type not supported")

    def sub(self, tag, root=None, **kwargs):
        skwargs = {k: str(v) for k, v in kwargs.items()}
        if root is None: root = self.node_root
        return etree.SubElement(root, tag, **skwargs)

    def execute(self):
        "should execute the external tool and set the memory"
        import msml.envconfig

        filenameSofaBatch = "%s_SOFA_batch.txt" % self.export_file

        with open(filenameSofaBatch, 'w') as f:
            timeSteps = self._msml_file.env.simulation[0].iterations  #only one step supported
            f.write(os.path.join(os.getcwd(), self.export_file) + ' ' + str(
                timeSteps) + ' ' + self.export_file + '.simu \n')
        #uncomment to use multiple gpus
        #os.putenv('CUDA_DEVICE', str(random.randint(0,3)))

        cmd = "%s -l SOFACuda %s" % (msml.envconfig.SOFA_EXECUTABLE, filenameSofaBatch)

        if (msml.envconfig.SOFA_EXECUTABLE.find('runSofa') > -1):
            timeSteps = self._msml_file.env.simulation[0].iterations  #only one step supported
            callCom = '-l C:\\msmldev\\sofa\\build\\applications\\plugins\\ldidetection\\Release\\ldidetection.dll'
            callCom = callCom + ' -l /usr/lib/libSofaCUDA.so -l /usr/lib/libMediAssist.so -g batch -n ' + str(
               timeSteps) + ' ' + os.path.join(os.getcwd(),
                                               self.export_file) + '\n'
            #callCom = os.path.join(os.getcwd(),self.export_file) + ' ' + str(timeSteps) + ' ' + '/tmp/simoutput.simu -l SofaCUDA -l MediAssist'
            cmd = "%s  %s" % (msml.envconfig.SOFA_EXECUTABLE, callCom )

        info("Executing %s" % cmd)
        info("Working directory: %s" % os.getcwd())

        import subprocess

        try:
            info("Start Sofa with: '%s'" % cmd)
            output = subprocess.check_output(cmd, stderr=subprocess.STDOUT, shell=True)
            for line in output.split("\n"):
                log.info("SOFA %s", line)
            info("Sofa ended normally.")
        except subprocess.CalledProcessError as e:
            for line in e.output.split("\n"):
                info("SOFA %s", line)
            fatal("SOFA exited with return code > 0 (%s) " % e.returncode)

        #os.system(cmd)
        return self._memory_update


def _bool(s):
    return s in ('true', 'on', 'yes', 'True', 'YES', 'ON')
