# region gplv3preamble
# The Medical Simulation Markup Language (MSML) - Simplifying the biomechanical modeling workflow
#
# MSML has been developed in the framework of 'SFB TRR 125 Cognition-Guided Surgery'
#
# If you use this software in academic work, please cite the paper:
# S. Suwelack, M. Stoll, S. Schalck, N.Schoch, R. Dillmann, R. Bendl, V. Heuveline and S. Speidel,
# The Medical Simulation Markup Language (MSML) - Simplifying the biomechanical modeling workflow,
# Medicine Meets Virtual Reality (MMVR) 2014
#
# Copyright (C) 2013-2014 see Authors.txt
#
# If you have any questions please feel free to contact us at suwelack@kit.edu
#
# This program is free software: you can redistribute it and/or modify
# it under the terms of the GNU General Public License as published by
# the Free Software Foundation, either version 3 of the License, or
# (at your option) any later version.
#
# This program is distributed in the hope that it will be useful,
# but WITHOUT ANY WARRANTY; without even the implied warranty of
# MERCHANTABILITY or FITNESS FOR A PARTICULAR PURPOSE.  See the
# GNU General Public License for more details.
#
# You should have received a copy of the GNU General Public License
# along with this program.  If not, see <http://www.gnu.org/licenses/>.
# endregion


__authors__ = 'Stefan Suwelack, Alexander Weigl, Markus Stoll'
__license__ = 'GPLv3'
__date__ = "2014-03-13"

import math
import os
import random
from path import path
import lxml.etree as etree

from .. import log
from ..model import *
from .base import XMLExporter
from msml.exceptions import *
from ..sortdef import VTK
from ..log import warn, info


class MSMLSOFAExporterWarning(MSMLWarning): pass


SOFA_EXPORTER_FEATURES = frozenset(
    ['object_element_displacement_supported', 'output_supported', 'object_element_mass_supported',
     'scene_objects_supported', 'constraints_supported', 'env_processingunit_CPU_supported',
     'material_region_supported', 'env_linearsolver_iterativeCG_supported', 'env_preconditioner_None_supported',
     'object_element_linearElasticMaterial_supported', 'sets_elements_supported', 'sets_nodes_supported',
     'sets_surface_supported', 'environment_simulation_steps_supported', 'object_element_fixedConstraint_supported',
     'env_timeintegration_dynamicImplicitEuler_supported'])


class SofaExporter(XMLExporter):
    def __init__(self, msml_file):
        """
      Args:
       executor (Executer)


      """
        self.id = 'SOFAExporter'
        self.initialize(
            msml_file, name=self.id,
            features=SOFA_EXPORTER_FEATURES
        )
        self.export_file = None
        self.working_dir = path()  #path.dirname(msml_file.filename)
        self._memory_update = {}  #cache for changes to _memory, updated after execution.
        self.commonSolvers = True; #all nodes have the sam solvers

    def init_exec(self, executer):
        """initialization by the executor, sets memory and executor member

         :return:
        """

        self._executer = executer
        self._memory = self._executer._memory

    def render(self):
        """
        Builds the File (XML e.g) for the external tool
        """

        self.export_file = path(self._msml_file.filename).namebase + ".scn"
        info("Converting to sofa scn: %s", self.export_file)

        import codecs

        with codecs.open(self.export_file, 'w', 'utf-8') as scnfile:  #should be open with codecs.open
            rootelement = self.write_scn()
            rootelement.write(scnfile, pretty_print=True)
            #s = etree.tostring(rootelement, encoding="utf-8")
            #scnfile.write(s)


    def execute(self):
        "should execute the external tool and set the memory"
        import msml.envconfig

        #uncomment to use four gpus
        #os.putenv('CUDA_DEVICE', str(random.randint(0,3)))

        cmd = msml.envconfig.SOFA_EXECUTABLE

        if (msml.envconfig.SOFA_EXECUTABLE.lower().find('runsofa') > -1): #linux: runSofa, windows: RunSofa.exe
            timeSteps = self._msml_file.env.simulation[0].iterations  #only one step supported
            #dschauba: use this for contact simulation with special SOFA version
            #callCom = '-l C:/msmldev/sofaneu/bin2/bin/ldidetection_1_0.dll -g guiBatch -n ' + str(
            #    timeSteps) + ' ' + os.path.join(os.getcwd(),self.export_file)
            callCom = '-l /usr/lib/libSofaCUDA.so -l /opt/sofa/lib/libMSML.so -l SOFACuda -g batch -n ' + str(
                timeSteps) + ' ' + os.path.join(os.getcwd(),
                                                self.export_file) + '\n'
            cmd = "%s  %s" % (msml.envconfig.SOFA_EXECUTABLE, callCom)

            log.info("Executing %s" % cmd)
            log.info("Working directory: %s" % os.getcwd())

        import subprocess

        try:
            log.info("Start Sofa with: '%s'" % cmd)
            output = subprocess.check_output(cmd, stderr=subprocess.STDOUT, shell=True)
            for line in output.split("\n"):
                log.info("SOFA %s", line)
            log.info("Sofa ended normally.")
        except subprocess.CalledProcessError as e:
            for line in e.output.split("\n"):
                log.info("SOFA %s", line)
            log.fatal("SOFA exited with return code > 0 (%s) " % e.returncode)

        #os.system(cmd)
        return self._memory_update


    def write_scn(self):
        processingUnit = self._msml_file.env.solver.processingUnit
        #TODO: processingUnit = self.get_value_from_memory(self._msml_file.env.solver.processingUnit)

        if processingUnit == "CPU":
            self._processing_unit = "Vec3f"
        elif processingUnit == "CPUDouble":
            self._processing_unit = "Vec3d"
        else:
            self._processing_unit = "CudaVec3f"

        self.node_root = self.createScene()

        for msmlObject in self._msml_file.scene:
            assert isinstance(msmlObject, SceneObject)

            #create object, the mesh, material regions and constraints
            objectNode = self.createObject(self.node_root, msmlObject)

            #physicsElementNode = msmlObject.find("material")
            self.createMeshTopology(objectNode, msmlObject)
            self.createMaterialRegions(objectNode, msmlObject)

            #create simulation steps
            self.createConstraintRegions(objectNode, msmlObject)

            #creat post processing request
            self.createPostProcessingRequests(objectNode, msmlObject)

        #daniel: moved this, each node could have its own solvers, right?
        #but for now, this method generates solvers below root-node NOT below individual object-node
        #add solver
        if (self.commonSolvers == True):
            self.createSolvers()


        return etree.ElementTree(self.node_root)

    def createMeshTopology(self, objectNode, msmlObject):
        assert isinstance(msmlObject, SceneObject)

        #daniel: for multi mesh support
        mesh_type = msmlObject.mesh.type
        mesh_id = self.get_input_mesh_name(msmlObject.mesh)
        meshFileName = self.working_dir / self.get_value_from_memory(mesh_id)

        # TODO currentMeshNode.get("name" )) - having a constant name for our the loader simplifies using it as source for nodes generated later.

        #check if child is present
        #if so, check operator compatibility
        #execute operator
        #check if mesh is in MSML folder

        #if not -> copy

        if mesh_type == "linearTet":
            loaderNode = self.sub("MeshVTKLoader", objectNode,
                                  name="LOADER", filename=meshFileName,
                                  createSubelements=0)
            #  createSubelements does not work as expected. If a single triangle exists in mesh, then for each facet of all tets a triangle is ceated... SOFA bug?
            self.sub("MechanicalObject", objectNode,
                     name="dofs", template=self._processing_unit, src="@LOADER")
            self.sub("MeshTopology", objectNode,
                     name="topo", src="@LOADER")
            if(msmlObject.hasContactGeometry):
                self.createContactNode(objectNode,msmlObject)
        elif mesh_type == "quadraticTet":
            loaderNode = self.sub("MeshExtendedVTKLoader", objectNode,
                                  name="LOADER", filename=meshFileName)
            self.sub("MechanicalObject", objectNode,
                     name="dofs", template=self._processing_unit, src="@LOADER")
            self.sub("QuadraticMeshTopology", objectNode,
                     name="topo", src="@LOADER")
        else:
            warn(MSMLSOFAExporterWarning,
                 "Mesh type must be mesh.volume.linearTetrahedron.vtk or mesh.volume.quadraticTetrahedron.vtk")
            return None
        return loaderNode

    def createContactNode(self,objectNode,msmlObject):
        surface_id = (msmlObject.id + "_surface")
        surfaceFileName = self.working_dir / self.get_value_from_memory(surface_id)
        collisionNode = self.sub("Node",objectNode,name="Contact")
        self.sub("MeshVTKLoader", collisionNode,name="LOADER" ,filename=surfaceFileName, createSubelements="0")
        self.sub("MechanicalObject",collisionNode,template="Vec3d", name="dofs",
                                            position="@LOADER.position",velocity="0 0 0",
                                            force="0 0 0",externalForce="0 0 0", derivX="0 0 0",  restScale="1" )
        self.sub("MeshTopology",collisionNode,name="topo",position="@LOADER.position",edges="@LOADER.edges",
                                        triangles="@LOADER.triangles",quads="@LOADER.quads", tetrahedra="@LOADER.tetras",  hexahedra="@LOADER.hexas")
        self.sub("BarycentricMapping", collisionNode,template="Vec3f,Vec3d", name="barycentricMap1",  input="@../",  output="@./" )
        self.sub("TriangleModelInRegularGrid",collisionNode,template="Vec3d", name="tTriangleModel1")
        self.sub("TLineModel", collisionNode,template="Vec3d")
        self.sub("TPointModel", collisionNode,template="Vec3d")
        #export contact geometry after simulation, if desired
        exportFile = msmlObject._contactGeometry.exportFile
        if(exportFile):
            self.sub("VTKExporter", collisionNode, XMLformat="1", edges="0", exportAtEnd="true", exportEveryNumberOfSteps="1",
                                filename=self.working_dir / exportFile,listening="true", tetras="1",triangles="1")


    def createSolvers(self, objectNode=None):
        #TODO: self.get_value_from_memory
        if objectNode is None: objectNode = self.node_root
        if self._msml_file.env.solver.timeIntegration == "Newmark":
            self.sub("MyNewmarkImplicitSolver", objectNode,
                     rayleighStiffness="0.2",
                     rayleighMass="0.02",
                     name="odesolver")
        elif self._msml_file.env.solver.timeIntegration == "NewmarkShapeMatching":
            self.sub("ShapeMatchingNewmarkImplicitSolver", objectNode,
                     rayleighStiffness="0.6",
                     rayleighMass="0.2",
                     name="odesolver")

        elif self._msml_file.env.solver.timeIntegration == "dynamicImplicitEuler":
            self.sub("EulerImplicitSolver", objectNode,
                     name="odesolver")
        else:
            warn(MSMLSOFAExporterWarning, "Error ODE solver %s not supported" %
                 self._msml_file.env.solver.timeIntegration)

        if self._msml_file.env.solver.linearSolver == "direct":
            self.sub("MumpsSolver", objectNode)
        elif self._msml_file.env.solver.linearSolver == "iterativeCG":
            self.sub("CGLinearSolver", objectNode,
                     iterations="100", tolerance="1e-06", threshold="1e-06")
        else:
            warn(MSMLSOFAExporterWarning, "Error linear solver %s not supported" %
                 self._msml_file.env.solver.linearSolver)


    def createMaterialRegions(self, objectNode, msmlObject):
        assert isinstance(msmlObject, SceneObject)

        isLinear= False

        youngs = {}
        poissons = {}
        density = {}

        for matregion in msmlObject.material:
            assert isinstance(matregion, MaterialRegion)
            indices_vec = self.get_value_from_memory(matregion)
            indices = '%s' % ', '.join(map(str, indices_vec))

            indices_int = [int(i) for i in indices.split(",")]
            indices_int.sort()

            #Get all materials
            for material in matregion:
                assert isinstance(material, ObjectElement)
                currentMaterialType = material.tag  #TODO: self.get_value_from_memory

                if currentMaterialType == "linearElasticMaterial":
                    currentYoungs = self.get_value_from_memory(material, "youngModulus")
                    currentPoissons = self.get_value_from_memory(material,
                                                                 "poissonRatio")  # not implemented in sofa yet!
                    for i in indices_int:  #TODO Performance (maybe generator should be make more sense)
                        youngs[i] = currentYoungs
                        poissons[i] = currentPoissons
                    isLinear = True

                if currentMaterialType == "corotatedElasticMaterial":
                    currentYoungs = self.get_value_from_memory(material, "youngModulus")
                    currentPoissons = self.get_value_from_memory(material,
                                                                 "poissonRatio")  # not implemented in sofa yet!
                    for i in indices_int:  #TODO Performance (maybe generator should be make more sense)
                        youngs[i] = currentYoungs
                        poissons[i] = currentPoissons


                elif currentMaterialType == "mass":
                    currentDensity = self.get_value_from_memory(material, "massDensity")
                    for i in indices_int:
                        density[i] = currentDensity
                else:
                    warn("Material Type not supported %s" % currentMaterialType, MSMLSOFAExporterWarning)


        def _to_str(mapping):
            keys = list(mapping.keys())
            keys.sort()
            sorted_values = (mapping[k] for k in keys)
            return ' '.join(map(str, sorted_values))

        density_str = _to_str(density)
        youngs_str = _to_str(youngs)
        poissons_str = _to_str(poissons)


        #merge all different materials to single forcefield/density entries.
        if objectNode.find("MeshTopology") is not None:
            elasticNode = self.sub("TetrahedronFEMForceField", objectNode,
                                   template=self._processing_unit, name="FEM",
                                   listening="true", youngModulus=youngs_str,
                                   poissonRatio=poissons[indices_int[0]] )
            if(isLinear):
                elasticNode.set('method', 'small')
            self.sub("TetrahedronSetGeometryAlgorithms", objectNode,
                     name="aTetrahedronSetGeometryAlgorithm",
                     template=self._processing_unit)
            if self._msml_file.env.solver.mass == "full":
                massNode = self.sub("LinearMeshMatrixMass", objectNode, name="meshMass")
                massNode.set("massDensity", density_str)
            else:
                massNode = self.sub("DiagonalMass", objectNode, name="meshMass")
                massNode.set("massDensity", density_str)

        elif objectNode.find("QuadraticMeshTopology") is not None:
            eelasticNode = self.sub("QuadraticTetrahedralCorotationalFEMForceField", objectNode,
                                    template=self._processing_unit, name="FEM", listening="true",
                                    youngModulus=youngs[0],
                                    poissonRatio=poissons[indices_int[0]])  # TODO
            emassNode = self.sub("QuadraticMeshMatrixMass", objectNode,
                                 name="meshMass", massDensity=density[0])
        else:
            warn(MSMLSOFAExporterWarning, "Current mesh topology not supported")


    def createConstraintRegions(self, objectNode, msmlObject):
        def _to_str(mapping):
            if (mapping is str):
                return mapping
            return ' '.join(map(str, mapping))

        assert isinstance(msmlObject, SceneObject)
        #do nothing on empty constraint set
        if(not any(msmlObject.constraints)):
            return
        for constraint_set in (msmlObject.constraints[0], ):  #TODO take all constraints
            assert isinstance(constraint_set, ObjectConstraints)

            for constraint in constraint_set.constraints:
                assert isinstance(constraint, ObjectElement)
                currentConstraintType = constraint.tag

                if currentConstraintType == "fixedConstraint":
                    indices_vec = self.get_value_from_memory(constraint, 'indices')
                    indices = '%s' % ', '.join(map(str, indices_vec))
                    constraintNode = self.sub("FixedConstraint", objectNode,
                                              name=constraint.id or constraint_set.name,
                                              indices=indices)

                    #elasticNode.set("setPoissonRatio", material.get("poissonRatio"))

                    #check if child is present

                    #if so, check operator compatibility

                    #execute operator

                    #check if mesh is in MSML folder

                    #if not -> copy
                elif currentConstraintType == "surfacePressure" or currentConstraintType == "surfacePressureOnMesh":
                    indices_vec = self.get_value_from_memory(constraint, 'indices')
                    indices = '%s' % ', '.join(map(lambda s: str(int(s)), indices_vec))

                    constraintNode = self.sub("Node", objectNode, name="SurfaceLoad")
                    vtkLoaderName = "LOADER"
                    #pulse mode default seems to be 1
                    pulseMode = '1'
                    #see if it is surface pressure with a mesh given
                    if(currentConstraintType == "surfacePressureOnMesh"):
                        #create a new vtkLoader for pressure mesh and adjust loader name
                        pressureMesh = self.get_value_from_memory(constraint, 'mesh')
                        vtkLoaderName = "PRESSUREMESHLOADER"
                        loaderNode = self.sub("MeshVTKLoader", constraintNode,
                                          name=vtkLoaderName,
                                          createSubelements="0",
                                          filename=pressureMesh)
                        pulseMode = self.get_value_from_memory(constraint, 'pulse')
                        #check if speed argument is given
                        speedArg = self.get_value_from_memory(constraint,"speed")
                    self.sub("MeshTopology", constraintNode,
                             name="SurfaceTopo",
                             position="@%s.position" % vtkLoaderName,
                             triangles="@%s.triangles" % vtkLoaderName, quads="@%s.quads" % vtkLoaderName)

                    self.sub("MechanicalObject", constraintNode, template="Vec3f", name="surfacePressDOF",
                             position="@SurfaceTopo.position")
                    pressureArg = self.get_value_from_memory(constraint, 'pressure')
                    if len(pressureArg) == 1:
                        pressure=pressureArg[0] #bad hack to implement the new definition of surfacePressure (pressure can be vector)
                        p_speed = pressure / 10
                        surfacePressureForceFieldNode = self.sub("SurfacePressureForceField", constraintNode,
                                                             template="Vec3f",
                                                             name="surfacePressure",
                                                             pulseMode=pulseMode,
                                                             pressureSpeed=p_speed,
                                                             # TODO this is broken
                                                             pressure=pressure,
                                                             triangleIndices=indices)
                    else:
                        #workaround for support of surfacePressure as  vector
                        #each distinct scalar pressure value in surfacePressure-vector gets a custom SurfacePressureForceField-Node
                        #each Node covers multiple indices, for indices having same pressure value assigned
                        pressureArg= [round(x,2) for x in pressureArg]
                         #daniel: speed hack for my contact model
                        p_speed = speedArg
                        sortedPressuresIndices = sorted((e,i) for i,e in enumerate(pressureArg))
                        values = set(map(lambda x:x[0], sortedPressuresIndices))
                        pressureGroups = [[y[1] for y in sortedPressuresIndices if y[0]==x] for x in values]
                        valueList = list(values)
                        for (groupId,pressureGroup) in enumerate(pressureGroups):
                            force = valueList[groupId]
                            surfacePressureForceFieldNode = self.sub("SurfacePressureForceField", constraintNode,
                                                             template="Vec3f",
                                                             name="surfacePressure_"+str(groupId),
                                                            pulseMode=pulseMode,
                                                            pressureSpeed=p_speed,
                                                           # TODO this is broken
                                                           pressure=force,
                                                           triangleIndices=pressureGroup)


                    self.sub("BarycentricMapping", constraintNode,
                             template=self._processing_unit + ",Vec3f",
                             name="barycentricMapSurfacePressure",
                             input="@..", output="@.")

                elif currentConstraintType == "springMeshToFixed":

                    constraintNode = self.sub("Node", objectNode, name="springMeshToFixed")
                    mechObj = self.sub("MechanicalObject", constraintNode, template="Vec3f",
                                       name="pointsInDeformingMesh",
                                       position=_to_str(self.get_value_from_memory(constraint, 'movingPoints')))

                    self.sub("BarycentricMapping", constraintNode,
                             template=self._processing_unit + ",Vec3f",
                             name="barycentricMapSpringMeshToFixed",
                             input="@..",
                             output="@.")

                    displacedLandLMarks = self.sub("Node", constraintNode,
                                                   name="fixedPointsForSpringMeshToFixed")

                    mechObj = self.sub("MechanicalObject", displacedLandLMarks,
                                       template="Vec3f",
                                       name="fixedPoints")

                    mechObj.set("position", _to_str(self.get_value_from_memory(constraint, 'fixedPoints')))

                    forcefield = self.sub("RestShapeSpringsForceField", constraintNode,
                                          template="Vec3f",
                                          name="Springs",
                                          external_rest_shape="fixedPointsForSpringMeshToFixed/fixedPoints",
                                          drawSpring="true",
                                          stiffness=self.get_value_from_memory(constraint, 'stiffness'),
                                          rayleighStiffnes=self.get_value_from_memory(constraint, 'rayleighStiffnes'))

                elif currentConstraintType == "supportingMesh":

                    constraintNode = self.sub("Node", objectNode, name="support_" + constraint.get("name"))
                    loaderNode = self.sub("MeshVTKLoader", constraintNode,
                                          name="LOADER_supportmesh",
                                          createSubelements="0",
                                          filename=self.get_value_from_memory(constraint, 'filename'))

                    self.sub("MechanicalObject", constraintNode,
                             name="dofs",
                             src="@LOADER_supportmesh",
                             template="Vec3f",
                             translation="0 0 0")

                    self.sub("MeshTopology", constraintNode,
                             name="topo",
                             src="@LOADER_supportmesh")

                    forcefield = self.sub("TetrahedronFEMForceField", constraintNode, listening="true",
                                          name="FEM",
                                          youngModulus=self.get_value_from_memory(constraint, 'youngModulus'),
                                          poissonRatio=self.get_value_from_memory(constraint, 'poissonRatio'))

                    self.sub("TetrahedronSetGeometryAlgorithms", constraintNode,
                             name="aTetrahedronSetGeometryAlgorithm")

                    diagonalMass = self.sub("DiagonalMass", constraintNode,
                                            name="meshMass",
                                            massDensity=self.get_value_from_memory(constraint, 'massDensity'))

                    self.sub("BarycentricMapping", constraintNode,
                             input="@..",
                             name="barycentricMap",
                             output="@.",
                             template=self._processing_unit + ",Vec3f")

                elif currentConstraintType == "displacementConstraint":
                    indices_vec = self.get_value_from_memory(constraint, 'indices')
                    indices = '%s' % ', '.join(map(str, indices_vec))

                    #compute length of time step to ensure the constraint at half-time of the the simulation.
                    timeSteps = self._msml_file.env.simulation[0].iterations
                    dt = self._msml_file.env.simulation[0].dt
                    timestep = (float(timeSteps)/2) * float(dt) / 10.0 #endtime of simulation must be divided by 10 for the constraint for some reason.
                    #timestep = float(timeSteps) * float(dt)
                    keytimes = '0 ' + str(timestep) + ' ' + str(
                        100000)  # this is a bad hack! -> if simulation runs further, it stays stable

                    #TODO: How do we get the disp values from memory?
                    disp_vec = self.get_value_from_memory(constraint, 'displacement')
                    #disp_vec = {0,0,0.01}
                    #if '$' not in constraint.displacement:
                    #    disp_vec = [float(x) for x in constraint.displacement]

                    if len(disp_vec) == 3:
                        tempMovement = '%s' % ' '.join(map(str, disp_vec))
                        theMovement = "0 0 0 " + tempMovement + " 0 0 0"
                        constraintNode = self.sub('LinearMovementConstraint', objectNode,
                                                  name=constraint.id or constraint_set.name,
                                                  indices=indices, movements=theMovement, keyTimes=keytimes)
                    else:
                        numberOfDisplacements = len(disp_vec) / 3;
                        if (numberOfDisplacements != len(indices_vec)):
                            print("Error, displacement vector and indices do not match.")
                        for i in range(0,numberOfDisplacements-1):
                            tempDisplacement = disp_vec[3*i:3*i+2]
                            tempMovement = '%s' % ' '.join(map(str, tempDisplacement))
                            theMovement = "0 0 0 " + tempMovement + " 0 0 0"
                            constraintNode = self.sub('LinearMovementConstraint', objectNode,
                              name=constraint.id+str(i) or constraint_set.name,
                              indices=str(indices_vec[i]), movements=theMovement, keyTimes=keytimes)
                        # constraintNode = self.sub("DirichletBoundaryConstraint", objectNode,
                        #                       name=constraint.id or constraint_set.name,
                        #                       dispIndices=indices, displacements=tempMovement)

                elif currentConstraintType == "forceConstraint":
                    indices_vec = self.get_value_from_memory(constraint, 'indices')
                    indices = '%s' % ', '.join(map(str, indices_vec))

                    #TODO: How do we get the disp values from memory?
                    force_vec = self.get_value_from_memory(constraint, 'force')
                    finalForceVec = list();

                    #if only one force is given, assign it to every node
                    if(len(force_vec)==3):
                        for index in indices_vec:
                            finalForceVec.extend(force_vec)
                    else:
                         finalForceVec =  force_vec

                    #disp_vec = {0,0,0.01}
                    #if '$' not in constraint.displacement:
                    #    disp_vec = [float(x) for x in constraint.displacement]

                    tempForce = '%s' % ' '.join(map(str, finalForceVec))

                    constraintNode = self.sub('ConstantForceField', objectNode,
                                              name=constraint.id or constraint_set.name,
                                              points=indices, forces=tempForce)

                elif currentConstraintType == "shapeMatchingConstraint":
                    referenceMesh = self.get_value_from_memory(constraint, 'referenceMesh')
                    charge = self.get_value_from_memory(constraint, 'charge')
                    adaptCharge= self.get_value_from_memory(constraint, 'adaptCharge')
                    samplingDistance = self.get_value_from_memory(constraint, 'samplingDistance')
                    adaptSamplingDistance = self.get_value_from_memory(constraint, 'adaptSamplingDistance')
                    adaptActiveTriangles = self.get_value_from_memory(constraint, 'adaptActiveTriangles')

                    constraintNode = self.sub('ShapeMatchingPoissonPotentialForcefield', objectNode,
                                              name=constraint.id or constraint_set.name,
                                              precomputedPotentialFieldFilename = referenceMesh, charge=charge, adaptCharge=adaptCharge,
                                              samplingDistance=samplingDistance, adaptSamplingDistance=adaptSamplingDistance, adaptActiveTriangles =adaptActiveTriangles)
                    self.createSolvers(objectNode)
                    self.commonSolvers = False
                    for mo in self.node_root.iter('MechanicalObject'):
                        mo.set("template", "Vec3d")

                    for theObj in self.node_root.iter('Node'):
                        #bad hack
                        for ls in self.node_root.iter('SparseMKLSolver'):
                            ls.getparent().remove(ls )
                            theObj.insert(0,ls )


                        for os in self.node_root.iter('ShapeMatchingNewmarkImplicitSolver'):
                            os.getparent().remove(os )
                            theObj.insert(0,os )

                    #constraintNode = self.sub("DirichletBoundaryConstraint", objectNode,
                    #                      name=constraint.id or constraint_set.name,
                    #                      dispIndices=indices, displacements=constraint.displacement)

                else:
                    warn(MSMLSOFAExporterWarning, "Constraint Type not supported %s " % currentConstraintType)


    def createObject(self, currentSofaNode, scobj):
        assert isinstance(scobj, SceneObject)
        objectNode = self.sub("Node", name=scobj.id)
        return objectNode


    def createScene(self):
        dt = str(self._msml_file.env.simulation[0].dt)
        root = etree.Element("Node", name="root", dt=dt)
        theGravityVec = self._msml_file.env.simulation[0].gravity
        theGravity = ' '.join('%.3f' % val for val in theGravityVec)
        #timeSteps = self._msml_file.env.simulation[0].iterations  #only one step supported
        if theGravity is None:
            theGravity = '0 -9.81 0'
        root.set("gravity", theGravity)
        #test if any SceneObject has contact geometry
        sceneHasContactGeom = any(map(lambda obj : (isinstance(obj,SceneObject) and obj.hasContactGeometry),
                                     self._msml_file._scene))
        if(sceneHasContactGeom):
            self.createSceneContactNodes(root)
        return root

        #sofa_exporter handles displacementOutputRequest only. Other postProcessing operators need to be adressed in... ?

    #create collision detection scene stuff
    def createSceneContactNodes(self, root):
        etree.SubElement(root,"LayeredDepthImagesPipeline",name="default0",pressure="5",
                                                                 resolution="128",resolutionPixel="80",
                                                                 depthBB="6",  GPUCollisionVolume="1")
        etree.SubElement(root,"LDIDetection", name="default1" )
        etree.SubElement(root,"MinProximityIntersection", name="Proximity",alarmDistance="0.3",contactDistance="0.2")
        etree.SubElement(root,"BruteForceDetection", name="N2")
        etree.SubElement(root,"DefaultContactManager", name="Response",  response="LDI")
        etree.SubElement(root,"DefaultCollisionGroupManager", name="Group")


    def createPostProcessingRequests(self, objectNode, msmlObject):
        if(self.id not in self._memory_update):
            self._memory_update={self.id:{}}
        for request in msmlObject.output:
            assert isinstance(request, ObjectElement)
            filename = self.working_dir / request.id

            if request.tag == "displacement":
                if objectNode.find("MeshTopology") is not None:
                    #dispOutputNode = self.sub(currentSofaNode, "ExtendedVTKExporter" )
                    exportEveryNumberOfSteps = request.get(
                        'timestep')  #TODO: self.get_value_from_memory(request, 'timestep')

                    dispOutputNode = self.sub("VTKExporter", objectNode,
                                              filename=filename,
                                              exportEveryNumberOfSteps=exportEveryNumberOfSteps,
                                              XMLformat=1,
                                              edges=0,
                                              #todo export material => allows extraction of surfaces in post processing
                                              tetras=1,
                                              triangles=0,
                                              listening="true",
                                              exportAtEnd="true")

                    timeSteps = self._msml_file.env.simulation[0].iterations  #TODO: self.get_value_from_memory

                    #exportEveryNumberOfSteps = 1 in SOFA means export every second time step.
                    #exportEveryNumberOfSteps = 0 in SOFA means do not export.
                    if exportEveryNumberOfSteps == 0:
                        lastNumber = 1
                    else:
                        lastNumber = int(math.floor(int(timeSteps) / ( int(exportEveryNumberOfSteps) + 1)))

                    lastNumberStr = str(lastNumber)
                    if _bool(request.useAsterisk):  #TODO: et_value_from_memory(request, 'useAsterisk')
                        lastNumberStr = "*"
                    self._memory_update[self.id][request.id] = VTK("%s%s.vtu" % (filename, lastNumberStr))

                elif objectNode.find("QuadraticMeshTopology") is not None:

                    exportEveryNumberOfSteps = request.get(
                        'timestep')  #TODO: self.get_value_from_memory(request, 'timestep')

                    dispOutputNode = self.sub("ExtendedVTKExporter", objectNode,
                                              filename=filename,
                                              exportEveryNumberOfSteps=exportEveryNumberOfSteps,
                                              edges=0,
                                              #todo export material => allows extraction of surfaces in post processing
                                              tetras=0,
                                              quadraticTetras=1,
                                              listening="true",
                                              exportAtEnd="true")

                    timeSteps = self._msml_file.env.simulation[0].iterations  #TODO: self.get_value_from_memory

                    #exportEveryNumberOfSteps = 1 in SOFA means export every second time step.
                    #exportEveryNumberOfSteps = 0 in SOFA means do not export.
                    if exportEveryNumberOfSteps == 0:
                        lastNumber = 1
                    else:
                        lastNumber = int(math.floor(int(timeSteps) / ( int(exportEveryNumberOfSteps) + 1)))

                    lastNumberStr = str(lastNumber)
                    if _bool(request.useAsterisk):  #TODO: et_value_from_memory(request, 'useAsterisk')
                        lastNumberStr = "*"
                    self._memory_update[self.id][request.id] = VTK("%s_%s.vtk" % (filename, lastNumberStr))

                    # untested block:

                    # timeSteps = self._msml_file.env.simulation[0].iterations
                    #
                    # #exportEveryNumberOfSteps = 1 in SOFA means export every second time step.
                    # #exportEveryNumberOfSteps = 0 in SOFA means do not export.
                    # if exportEveryNumberOfSteps == 0:
                    #     lastNumber = 1
                    # else:
                    #     lastNumber = int(math.floor(int(timeSteps) / ( int(exportEveryNumberOfSteps) + 1)))
                    #
                    #if _bool(request.useAsterisk):
                    #    self._memory_update[self.id] = {request.id: VTK(str(filename + '*' + ".vtu"))}
                    #else:
                    #    self._memory_update[self.id] = {request.id: VTK(str(filename + str(lastNumber) + ".vtu"))}


                    #TODO: Fill "filename" of request taking output numbering into account (see VTKExporter)
                else:
                    warn(MSMLSOFAExporterWarning, "Topolgy type not supported")

    def sub(self, tag, root=None, **kwargs):
        skwargs = {k: str(v) for k, v in kwargs.items()}
        if root is None: root = self.node_root
        return etree.SubElement(root, tag, **skwargs)


def _bool(s):
    return s in ('true', 'on', 'yes', 'True', 'YES', 'ON')
